// SBML level 3 version 2

model biocrnpyler_508396()
  // model units - substance: mole, time: second, volume: litre, area: square_metre, length: metre, extent: mole

  // Compartments:
  compartment default = 1e-6;

  // Species:
  species A in default = 0;
  species B in default = 0;
  species C in default = 0;

  // Reactions:
  r0: => A; r0_k/(1 + (C/r0_K)^r0_n);  // modifiers: C
    r0_k = 1; r0_K = 1; r0_n = 2;
  r1: => B; r1_k/(1 + (A/r1_K)^r1_n);  // modifiers: A
    r1_k = 1; r1_K = 1; r1_n = 2;
  r2: => C; r2_k/(1 + (B/r2_K)^r2_n);  // modifiers: B
    r2_k = 1; r2_K = 1; r2_n = 2;

  // Unit definitions:
  unit square_metre = metre^2;
end
